f - natural_frequency
m - mass_of_the_beam
k - stiffness
M - additional_weight
E - modulus_of_elasticity(constant)
b - width_of_the_beam
h - thickness_of_the_beam
L - length_of_the_beam
nthroot((k/(m + M)), f∝)  # k∝E*(b*h^3/L^3)  # m∝bhL
nthroot(E*(b*h^3/L^3)*(1/(m + M)), f∝)
# By what factor(x) should the additional weight(M) be reduced to maintian the same natural frequency of the system if the width(b), thickness(h) and length(L) of the beam are reduced by half?
E*(b*h^3/L^3)*(1/(m + M))
# =
E*(b/2*(h/2)^3/(L/2)^3)*(1/((m/8) + M*x))
(m/8) + M*x  # =
(m + M)/2
x
# =
1/8*(3*m/M + 4)
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